// COMSOL Multiphysics 4.3a (Build: 161) model "natural_convection_comsol.mph"
// Outline of the model tree

Parameters
  Ra = 1e3  // Rayleigh number
  Pr = 0.71  // Prandtl number (air)
  nel = 32  // elements per side
  T0 = 0.5[K]  // reference temperature

Geometry
  geom1 "Geometry 1" (2D, length unit m)
    sq1: Square | size = 1
    fin: Finalize "Form Union"

Materials
  mat1 "Material 1" on all domains
    def "Basic"
      thermalconductivity = 1
      density = 1
      heatcapacity = 1

Physics
  nitf: ConjugateHeatTransferLaminar "Conjugate Heat Transfer" on all domains
    dependent variable u = {u, v, w}
    solid1: SolidHeatTransferModel "Heat Transfer in Solids 1" (default)
    ins1: ThermalInsulation (default)
    wall1: Wall (default)
    fluid1: NonIsothermalFlowModel "Fluid 1" (default) | mu_mat = userdef; mu = Pr; gamma_mat = userdef; gamma = 1
    init1: init "Initial Values 1" (default) | T = (1-x/1[m])*1[K]
    vf1: VolumeForce on all domains | F = {0, Ra*Pr*nitf.rho*(T-T0)*1[m/(s^2*K)], 0}
    temp1: TemperatureBoundary "Temperature 1" on boundaries 1 | T0 = 1[K]
    temp2: TemperatureBoundary "Temperature 2" on boundaries 4 | T0 = 0[K]
    prpc1: PressurePointConstraint on points 1

Mesh
  mesh1 "Mesh 1"
    size: MeshSizeDefault | hmax = 0.067; hmin = 3.0E-4; hcurve = 0.3; hnarrow = 1; hgrad = 1.3; hauto = 5
    map1: Map "Mapped 1" on remaining entities
      dis1: Distribution on all boundaries | numelem = nel

Studies
  std1 "Study 1"
    param: Parametric "Parametric Sweep" | sweeptype = filled; pname = {nel, Ra}; plistarr = {32 64 128, 1e3 1e4}
    stat: Stationary

Solver configurations
  sol1 "Solver 1" (study std1)
    v1: Variables "Dependent Variables 1"
    s1: Stationary "Stationary Solver 1"
      fc1: FullyCoupled
        linsolver = d1
        dtech = const
        maxiter = 100
        damp = 0.8
        usecflcmp = on
        initcfl = 5
        kppid = 0.65
        kdpid = 0.05
        kipid = 0.05
        cfltol = 0.1
      d1: Direct | linsolver = pardiso
  sol2 "Parametric 2" (study std1)

Datasets
  dset1: Solution | solution = sol1
  dset2: Solution | solution = sol2
  cln1: CutLine2D | data = dset2; genpoints = {{0.5, 0}, {0.5, 1}}
  cln2: CutLine2D | data = dset2; genpoints = {{0, 0.5}, {1, 0.5}}

Derived values
  int1: IntLine "Line Integration 1" on boundaries 1 | data = dset2; table = tbl1; expr = -Tx*1[m/K]
  int2: IntLine "Line Integration 2" on boundaries 4 | data = dset2; table = tbl2; expr = -Tx*1[m/K]

Tables
  tbl1: Table
    // Line Integration 1 (-Tx*1[m/K])
    nel | Ra | -Tx*1[m/K] (m) | -Tx*1[m/K] (m)
    32 | 1000 | 1.11652 | 1.11652
    32 | 10000 | 2.23489 | 2.23489
    64 | 1000 | 1.11749 | 1.11749
    64 | 10000 | 2.24272 | 2.24272
    128 | 1000 | 1.11771 | 1.11771
    128 | 10000 | 2.24435 | 2.24435
  tbl2: Table
    // Line Integration 2 (-Tx*1[m/K])
    nel | Ra | -Tx*1[m/K] (m)
    32 | 1000 | 1.11652
    32 | 10000 | 2.23489
    64 | 1000 | 1.11749
    64 | 10000 | 2.24272
    128 | 1000 | 1.11771
    128 | 10000 | 2.24435

Plots
  pg1: PlotGroup2D "Velocity (nitf)" | data = dset2
    surf1: Surface | expr = nitf.U
  pg2: PlotGroup2D "Temperature (nitf)" | data = dset2
    surf1: Surface | expr = T
    str1: Streamline
      expr = {u, v}
      startmethod = coord
      xcoord = {0.5, 0.5, 0.5, 0.5, 0.5, 0.5, 0.5, 0.5}
      ycoord = {0.56, 0.62, 0.68, 0.74, 0.8, 0.86, 0.92, 0.97}

Exports
  data1: Data | data = cln2; expr = {u, v, T}; filename = H:\My Drive\Comsol Course\Problem7_natural_convection\cuty_5.txt